<Lems>

  <!-- Tell jLEMS/jNeuroML which component is the simulation entry point. -->
  <Target component="sim_Generic2dOscillator_LEMS_Export"/>

  <!-- ════════════════════════════════════════════════════════════════
       Dimensions & Units (inline — no external includes needed)
       ════════════════════════════════════════════════════════════════ -->

  <!-- Dimensions -->
  <Dimension name="none"/>
  <Dimension name="time" t="1"/>
  <Dimension name="voltage" m="1" l="2" t="-3" i="-1"/>
  <Dimension name="per_time" t="-1"/>
  <Dimension name="conductance" m="-1" l="-2" t="3" i="2"/>
  <Dimension name="capacitance" m="-1" l="-2" t="4" i="2"/>
  <Dimension name="current" i="1"/>
  <Dimension name="resistance" m="1" l="2" t="-3" i="-2"/>
  <Dimension name="concentration" l="-3" n="1"/>
  <Dimension name="substance" n="1"/>
  <Dimension name="charge" t="1" i="1"/>
  <Dimension name="temperature" k="1"/>

  <!-- Units -->
  <Unit symbol="s" dimension="time" power="0"/>
  <Unit symbol="ms" dimension="time" power="-3"/>
  <Unit symbol="us" dimension="time" power="-6"/>
  <Unit symbol="V" dimension="voltage" power="0"/>
  <Unit symbol="mV" dimension="voltage" power="-3"/>
  <Unit symbol="A" dimension="current" power="0"/>
  <Unit symbol="mA" dimension="current" power="-3"/>
  <Unit symbol="nA" dimension="current" power="-9"/>
  <Unit symbol="pA" dimension="current" power="-12"/>
  <Unit symbol="S" dimension="conductance" power="0"/>
  <Unit symbol="mS" dimension="conductance" power="-3"/>
  <Unit symbol="nS" dimension="conductance" power="-9"/>
  <Unit symbol="F" dimension="capacitance" power="0"/>
  <Unit symbol="uF" dimension="capacitance" power="-6"/>
  <Unit symbol="nF" dimension="capacitance" power="-9"/>
  <Unit symbol="ohm" dimension="resistance" power="0"/>
  <Unit symbol="Mohm" dimension="resistance" power="6"/>
  <Unit symbol="per_s" dimension="per_time" power="0"/>
  <Unit symbol="per_ms" dimension="per_time" power="3"/>
  <Unit symbol="degC" dimension="temperature" offset="273.15"/>
  <Unit symbol="K" dimension="temperature" power="0"/>

  <!-- ════════════════════════════════════════════════════════════════
       LEMS Simulation infrastructure types
       (normally provided by Simulation.xml — defined inline to avoid
       the jNeuroML double-read bug)
       ════════════════════════════════════════════════════════════════ -->
  <ComponentType name="Simulation">
    <Parameter name="length" dimension="time"/>
    <Parameter name="step" dimension="time"/>
    <Children name="outputs" type="OutputFile"/>
    <ComponentReference name="target" type="Component"/>
    <Dynamics>
      <StateVariable name="t" dimension="time"/>
    </Dynamics>
    <Simulation>
      <Run component="target" variable="t" increment="step" total="length"/>
    </Simulation>
  </ComponentType>

  <ComponentType name="OutputFile">
    <Children name="outputColumn" type="OutputColumn"/>
    <Text name="fileName"/>
    <Text name="path"/>
    <Simulation>
      <DataWriter path="path" fileName="fileName"/>
    </Simulation>
  </ComponentType>

  <ComponentType name="OutputColumn">
    <Path name="quantity"/>
    <Simulation>
      <Record quantity="quantity"/>
    </Simulation>
  </ComponentType>

  <!-- ════════════════════════════════════════════════════════════════
       Dynamics ComponentType & Component instances
       ════════════════════════════════════════════════════════════════ -->

  <!-- ════════════════════════════════════════════════════════════════
       ComponentType: Generic2dOscillator
       Generated from TVBO Dynamics: Generic2dOscillator
       ════════════════════════════════════════════════════════════════ -->
  <ComponentType name="Generic2dOscillator">

    <!-- Parameters -->
    <Parameter name="I" dimension="none"/>
    <Parameter name="a" dimension="none"/>
    <Parameter name="alpha" dimension="none"/>
    <Parameter name="b" dimension="none"/>
    <Parameter name="beta" dimension="none"/>
    <Parameter name="c" dimension="none"/>
    <Parameter name="d" dimension="none"/>
    <Parameter name="e" dimension="none"/>
    <Parameter name="f" dimension="none"/>
    <Parameter name="g" dimension="none"/>
    <Parameter name="gamma" dimension="none"/>
    <Parameter name="tau" dimension="none"/>
    <!-- Coupling inputs -->
    <Parameter name="c_glob" dimension="none"/>
    <Parameter name="local_coupling" dimension="none"/>
    <!-- Initial condition parameters -->
    <Parameter name="V_0" dimension="none"/>
    <Parameter name="W_0" dimension="none"/>

    <!-- Time constant for derivatives.
         All parameters use dimension="none" to avoid jLEMS dimensional
         analysis failures (neural-mass models mix units freely).
         / SEC is always applied so the TimeDerivative has per_time
         dimension.  When the model already has time units in parameters,
         SEC = 1s (numerically 1.0 — identity); otherwise SEC = 1<time_scale>
         provides the actual numeric conversion.
         needs_sec=True  time_scale=ms -->
    <Constant name="SEC" dimension="time" value="1ms"/>

    <!-- Exposures (one per state variable) -->
    <Exposure name="V" dimension="none"/>
    <Exposure name="W" dimension="none"/>

    <Dynamics>

      <!-- State variables -->
      <StateVariable name="V" dimension="none" exposure="V"/>
      <StateVariable name="W" dimension="none" exposure="W"/>

      <!-- Derived variables (simple and conditional/piecewise) -->

      <!-- ── Flat dynamics (no spike events) ── -->

      <!-- Time derivatives -->
      <TimeDerivative variable="V" value="(d*tau*(I*gamma + V*g + V*local_coupling + W*alpha + c_glob*gamma + e*V^2 - f*V^3)) / SEC"/>
      <TimeDerivative variable="W" value="(d*(a + V*b + c*V^2 - W*beta)/tau) / SEC"/>

      <!-- Initial conditions -->
      <OnStart>
        <StateAssignment variable="V" value="V_0"/>
        <StateAssignment variable="W" value="W_0"/>
      </OnStart>

      <!-- Events (non-spike) -->

    </Dynamics>

  </ComponentType>

  <!-- ════════════════════════════════════════════════════════════════
       Component instances (default parameter values)
       ════════════════════════════════════════════════════════════════ -->
  <Component id="Generic2dOscillator_inst" type="Generic2dOscillator" I="0.0" a="-2.0" alpha="1.0" b="-10.0" beta="1.0" c="0.0" d="0.02" e="3.0" f="1.0" g="0.0" gamma="1.0" tau="1.0" c_glob="0" local_coupling="0" V_0="0.1" W_0="0.1"/>

  <!-- ════════════════════════════════════════════════════════════════
       Simulation — target the component instance directly.
       Output: one file with all state variables.
       ════════════════════════════════════════════════════════════════ -->
  <Simulation id="sim_Generic2dOscillator_LEMS_Export" length="1000.0ms" step="0.01220703125ms" target="Generic2dOscillator_inst">

    <OutputFile id="of1" fileName="results/Generic2dOscillator.dat">
      <OutputColumn id="V" quantity="V"/>
      <OutputColumn id="W" quantity="W"/>
    </OutputFile>

  </Simulation>

</Lems>
